<?xml version="1.0" encoding="UTF-8"?>
<neuroml xmlns="http://morphml.org/neuroml/schema"
    xmlns:mml="http://morphml.org/morphml/schema"
    xmlns:meta="http://morphml.org/metadata/schema"
    xmlns:bio="http://morphml.org/biophysics/schema"
    xmlns:cml="http://morphml.org/channelml/schema"
    xmlns:xsi="http://www.w3.org/2001/XMLSchema-instance"
    xsi:schemaLocation="http://morphml.org/neuroml/schema http://www.neuroml.org/NeuroMLValidator/NeuroMLFiles/Schemata/v1.8.1/Level3/NeuroML_Level3_v1.8.1.xsd"
    name = "NeuroML Level 2 file exported from NEURON"
    lengthUnits="micron">

<meta:notes>NeuroML Level 2 file generated from ModelView by: NEURON -- Release 7.2 (551:9d708f513f8c) 2011-11-22
Authors: Michael Hines, Sushil Kambampati and Padraig Gleeson,
Yale University and UCL</meta:notes>

<cells>
  <cell name="GrC_0">
    <meta:notes>Cell: GrC_0 exported from NEURON ModelView</meta:notes>
    <segments  xmlns="http://morphml.org/morphml/schema"> <!-- Changing the namespace from neuroml to morphml-->
<!-- Section: GrC[0].branch3 which has 3 3D points, so 2 segment(s)-->
      <segment id="0" name = "Seg0_branch3" cable = "55">
        <proximal x="0" y="0" z="0" diameter="0.1"/>
        <distal x="100" y="0" z="0" diameter="0.1"/>
      </segment>
      <segment id="112" name = "Seg1_branch3" parent="0" cable = "55">
        <distal x="200" y="0" z="0" diameter="0.1"/>
      </segment>
<!-- Section: GrC[0].branch2 which has 3 3D points, so 2 segment(s)-->
      <segment id="109" name = "Seg0_branch2" parent="112" cable = "54">  <!-- Parent section: GrC[0].branch3 -->
        <proximal x="200" y="0" z="0" diameter="0.1"/>
        <distal x="205" y="0" z="0" diameter="0.1"/>
      </segment>
      <segment id="110" name = "Seg1_branch2" parent="109" cable = "54">
        <distal x="210" y="0" z="0" diameter="0.1"/>
      </segment>
<!-- Section: GrC[0].branch1 which has 3 3D points, so 2 segment(s)-->
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    </segments>
    <cables  xmlns="http://morphml.org/morphml/schema"> <!-- Changing namespace from neuroml to morphml-->
      <cable id = "55" name = "branch3" fract_along_parent = "0"/>
      <cable id = "54" name = "branch2"/>
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      <cablegroup name="all"> <!-- Replacing subset name ModelViewParmSubset_0 with all, as it contains all sections -->
        <cable id = "55"/>
        <cable id = "54"/>
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      </cablegroup>
      <cablegroup name="ModelViewParmSubset_1">
        <cable id = "35"/>
        <cable id = "34"/>
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      </cablegroup>
      <cablegroup name="ModelViewParmSubset_2">
        <cable id = "35"/>
        <cable id = "34"/>
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      </cablegroup>
      <cablegroup name="ModelViewParmSubset_3">
        <cable id = "0"/>
        <cable id = "39"/>
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      </cablegroup>
      <cablegroup name="ModelViewParmSubset_4">
        <cable id = "0"/>
      </cablegroup>
      <cablegroup name="ModelViewParmSubset_5">
        <cable id = "55"/>
        <cable id = "53"/>
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      </cablegroup>
      <cablegroup name="ModelViewParmSubset_6">
        <cable id = "55"/>
        <cable id = "54"/>
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      </cablegroup>
      <cablegroup name="ModelViewParmSubset_7">
        <cable id = "0"/>
        <cable id = "39"/>
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      </cablegroup>
      <cablegroup name="ModelViewParmSubset_8">
        <cable id = "51"/>
        <cable id = "50"/>
        <cable id = "49"/>
        <cable id = "48"/>
      </cablegroup>
      <cablegroup name="ModelViewParmSubset_9">
        <cable id = "39"/>
        <cable id = "38"/>
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      </cablegroup>
      <cablegroup name="ModelViewParmSubset_10">
        <cable id = "35"/>
        <cable id = "34"/>
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      </cablegroup>
      <cablegroup name="ModelViewParmSubset_11">
        <cable id = "5"/>
        <cable id = "4"/>
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      </cablegroup>
      <cablegroup name="ModelViewParmSubset_12">
        <cable id = "55"/>
        <cable id = "54"/>
        <cable id = "53"/>
        <cable id = "52"/>
      </cablegroup>
      <cablegroup name="ModelViewParmSubset_13">
        <cable id = "39"/>
        <cable id = "38"/>
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      </cablegroup>
      <cablegroup name="ModelViewParmSubset_14">
        <cable id = "47"/>
        <cable id = "46"/>
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      </cablegroup>
      <cablegroup name="OneSecGrp_SectionRef_57"> <!-- Creating a group containing a single section: GrC[0].branch2... -->
        <cable id = "54"/>
      </cablegroup>
      <cablegroup name="OneSecGrp_SectionRef_58"> <!-- Creating a group containing a single section: GrC[0].branch1... -->
        <cable id = "53"/>
      </cablegroup>
      <cablegroup name="OneSecGrp_SectionRef_59"> <!-- Creating a group containing a single section: GrC[0].branch0... -->
        <cable id = "52"/>
      </cablegroup>
      <cablegroup name="OneSecGrp_SectionRef_95"> <!-- Creating a group containing a single section: GrC[0].soma... -->
        <cable id = "0"/>
      </cablegroup>
    </cables>
    <biophysics  units = "Physiological Units"> <!-- Note: values of cond dens are different in NEURON and phy units-->
      <bio:mechanism name="GRC_CA" type="Channel Mechanism">
        <bio:parameter name="Aalpha" value="0.04944">
          <bio:group>ModelViewParmSubset_3</bio:group>
        </bio:parameter>
        <bio:parameter name="Kalpha" value="15.873">
          <bio:group>ModelViewParmSubset_3</bio:group>
        </bio:parameter>
        <bio:parameter name="V0alpha" value="-29.06">
          <bio:group>ModelViewParmSubset_3</bio:group>
        </bio:parameter>
        <bio:parameter name="Abeta" value="0.08298">
          <bio:group>ModelViewParmSubset_3</bio:group>
        </bio:parameter>
        <bio:parameter name="Kbeta" value="-25.641">
          <bio:group>ModelViewParmSubset_3</bio:group>
        </bio:parameter>
        <bio:parameter name="V0beta" value="-18.66">
          <bio:group>ModelViewParmSubset_3</bio:group>
        </bio:parameter>
        <bio:parameter name="Aalpha" value="0.0013">
          <bio:group>ModelViewParmSubset_3</bio:group>
        </bio:parameter>
        <bio:parameter name="Kalpha" value="-18.183">
          <bio:group>ModelViewParmSubset_3</bio:group>
        </bio:parameter>
        <bio:parameter name="V0alpha" value="-48">
          <bio:group>ModelViewParmSubset_3</bio:group>
        </bio:parameter>
        <bio:parameter name="Abeta" value="0.0013">
          <bio:group>ModelViewParmSubset_3</bio:group>
        </bio:parameter>
        <bio:parameter name="Kbeta" value="83.33">
          <bio:group>ModelViewParmSubset_3</bio:group>
        </bio:parameter>
        <bio:parameter name="V0beta" value="-48">
          <bio:group>ModelViewParmSubset_3</bio:group>
        </bio:parameter>
        <bio:parameter name="gmax" value="0">
          <bio:group>ModelViewParmSubset_7</bio:group>
        </bio:parameter>
        <bio:parameter name="gmax" value="5.84247">
          <bio:group>ModelViewParmSubset_8</bio:group>
        </bio:parameter>
      </bio:mechanism>
      <bio:mechanism name="GRC_CALC" type="Channel Mechanism">
        <bio:parameter name="d" value="0.2">
          <bio:group>ModelViewParmSubset_3</bio:group>
        </bio:parameter>
        <bio:parameter name="cai0" value="0.0001">
          <bio:group>OneSecGrp_SectionRef_95</bio:group>
        </bio:parameter>
        <bio:parameter name="cai0" value="0.00225">
          <bio:group>ModelViewParmSubset_9</bio:group>
        </bio:parameter>
        <bio:parameter name="beta" value="0.6">
          <bio:group>ModelViewParmSubset_9</bio:group>
        </bio:parameter>
        <bio:parameter name="beta" value="1.5">
          <bio:group>OneSecGrp_SectionRef_95</bio:group>
        </bio:parameter>
      </bio:mechanism>
      <bio:mechanism name="GRC_KA" type="Channel Mechanism">
        <bio:parameter name="Aalpha" value="0.8147">
          <bio:group>ModelViewParmSubset_3</bio:group>
        </bio:parameter>
        <bio:parameter name="Kalpha" value="-23.3271">
          <bio:group>ModelViewParmSubset_3</bio:group>
        </bio:parameter>
        <bio:parameter name="V0alpha" value="-9.17203">
          <bio:group>ModelViewParmSubset_3</bio:group>
        </bio:parameter>
        <bio:parameter name="Abeta" value="0.1655">
          <bio:group>ModelViewParmSubset_3</bio:group>
        </bio:parameter>
        <bio:parameter name="Kbeta" value="19.4718">
          <bio:group>ModelViewParmSubset_3</bio:group>
        </bio:parameter>
        <bio:parameter name="V0beta" value="-18.2791">
          <bio:group>ModelViewParmSubset_3</bio:group>
        </bio:parameter>
        <bio:parameter name="Aalpha" value="0.0368">
          <bio:group>ModelViewParmSubset_3</bio:group>
        </bio:parameter>
        <bio:parameter name="Kalpha" value="12.8433">
          <bio:group>ModelViewParmSubset_3</bio:group>
        </bio:parameter>
        <bio:parameter name="V0alpha" value="-111.332">
          <bio:group>ModelViewParmSubset_3</bio:group>
        </bio:parameter>
        <bio:parameter name="Abeta" value="0.0345">
          <bio:group>ModelViewParmSubset_3</bio:group>
        </bio:parameter>
        <bio:parameter name="Kbeta" value="-8.90123">
          <bio:group>ModelViewParmSubset_3</bio:group>
        </bio:parameter>
        <bio:parameter name="V0beta" value="-49.9537">
          <bio:group>ModelViewParmSubset_3</bio:group>
        </bio:parameter>
        <bio:parameter name="V0" value="-38">
          <bio:group>ModelViewParmSubset_3</bio:group>
        </bio:parameter>
        <bio:parameter name="K" value="-17">
          <bio:group>ModelViewParmSubset_3</bio:group>
        </bio:parameter>
        <bio:parameter name="V0" value="-78.8">
          <bio:group>ModelViewParmSubset_3</bio:group>
        </bio:parameter>
        <bio:parameter name="K" value="8.4">
          <bio:group>ModelViewParmSubset_3</bio:group>
        </bio:parameter>
        <bio:parameter name="gmax" value="0">
          <bio:group>ModelViewParmSubset_9</bio:group>
        </bio:parameter>
        <bio:parameter name="gmax" value="9.06137">
          <bio:group>OneSecGrp_SectionRef_95</bio:group>
        </bio:parameter>
      </bio:mechanism>
      <bio:mechanism name="GRC_KCA" type="Channel Mechanism">
        <bio:parameter name="Aalpha" value="2.5">
          <bio:group>ModelViewParmSubset_3</bio:group>
        </bio:parameter>
        <bio:parameter name="Balpha" value="0.0015">
          <bio:group>ModelViewParmSubset_3</bio:group>
        </bio:parameter>
        <bio:parameter name="Kalpha" value="-11.765">
          <bio:group>ModelViewParmSubset_3</bio:group>
        </bio:parameter>
        <bio:parameter name="Abeta" value="1.5">
          <bio:group>ModelViewParmSubset_3</bio:group>
        </bio:parameter>
        <bio:parameter name="Bbeta" value="0.00015">
          <bio:group>ModelViewParmSubset_3</bio:group>
        </bio:parameter>
        <bio:parameter name="Kbeta" value="-11.765">
          <bio:group>ModelViewParmSubset_3</bio:group>
        </bio:parameter>
        <bio:parameter name="gmax" value="0">
          <bio:group>ModelViewParmSubset_7</bio:group>
        </bio:parameter>
        <bio:parameter name="gmax" value="38.103">
          <bio:group>ModelViewParmSubset_8</bio:group>
        </bio:parameter>
      </bio:mechanism>
      <bio:mechanism name="GRC_KIR" type="Channel Mechanism">
        <bio:parameter name="Aalpha" value="0.13289">
          <bio:group>ModelViewParmSubset_3</bio:group>
        </bio:parameter>
        <bio:parameter name="Kalpha" value="-24.3902">
          <bio:group>ModelViewParmSubset_3</bio:group>
        </bio:parameter>
        <bio:parameter name="V0alpha" value="-83.94">
          <bio:group>ModelViewParmSubset_3</bio:group>
        </bio:parameter>
        <bio:parameter name="Abeta" value="0.16994">
          <bio:group>ModelViewParmSubset_3</bio:group>
        </bio:parameter>
        <bio:parameter name="Kbeta" value="35.714">
          <bio:group>ModelViewParmSubset_3</bio:group>
        </bio:parameter>
        <bio:parameter name="V0beta" value="-83.94">
          <bio:group>ModelViewParmSubset_3</bio:group>
        </bio:parameter>
        <bio:parameter name="gmax" value="0">
          <bio:group>ModelViewParmSubset_9</bio:group>
        </bio:parameter>
        <bio:parameter name="gmax" value="2.54851">
          <bio:group>OneSecGrp_SectionRef_95</bio:group>
        </bio:parameter>
      </bio:mechanism>
      <bio:mechanism name="GRC_KM" type="Channel Mechanism">
        <bio:parameter name="Aalpha" value="0.0033">
          <bio:group>OneSecGrp_SectionRef_95</bio:group>
        </bio:parameter>
        <bio:parameter name="Kalpha" value="40">
          <bio:group>OneSecGrp_SectionRef_95</bio:group>
        </bio:parameter>
        <bio:parameter name="V0alpha" value="-30">
          <bio:group>OneSecGrp_SectionRef_95</bio:group>
        </bio:parameter>
        <bio:parameter name="Abeta" value="0.0033">
          <bio:group>OneSecGrp_SectionRef_95</bio:group>
        </bio:parameter>
        <bio:parameter name="Kbeta" value="-20">
          <bio:group>OneSecGrp_SectionRef_95</bio:group>
        </bio:parameter>
        <bio:parameter name="V0beta" value="-30">
          <bio:group>OneSecGrp_SectionRef_95</bio:group>
        </bio:parameter>
        <bio:parameter name="V0" value="-35">
          <bio:group>OneSecGrp_SectionRef_95</bio:group>
        </bio:parameter>
        <bio:parameter name="B" value="6">
          <bio:group>OneSecGrp_SectionRef_95</bio:group>
        </bio:parameter>
        <bio:parameter name="gmax" value="0.25">
          <bio:group>OneSecGrp_SectionRef_95</bio:group>
        </bio:parameter>
      </bio:mechanism>
      <bio:mechanism name="GRC_KV" type="Channel Mechanism">
        <bio:parameter name="Aalpha" value="-0.01">
          <bio:group>ModelViewParmSubset_1</bio:group>
        </bio:parameter>
        <bio:parameter name="Kalpha" value="-10">
          <bio:group>ModelViewParmSubset_1</bio:group>
        </bio:parameter>
        <bio:parameter name="V0alpha" value="-25">
          <bio:group>ModelViewParmSubset_1</bio:group>
        </bio:parameter>
        <bio:parameter name="Abeta" value="0.125">
          <bio:group>ModelViewParmSubset_1</bio:group>
        </bio:parameter>
        <bio:parameter name="Kbeta" value="-80">
          <bio:group>ModelViewParmSubset_1</bio:group>
        </bio:parameter>
        <bio:parameter name="V0beta" value="-35">
          <bio:group>ModelViewParmSubset_1</bio:group>
        </bio:parameter>
        <bio:parameter name="gmax" value="0">
          <bio:group>OneSecGrp_SectionRef_95</bio:group>
        </bio:parameter>
        <bio:parameter name="gmax" value="4.47431">
          <bio:group>ModelViewParmSubset_10</bio:group>
        </bio:parameter>
        <bio:parameter name="gmax" value="35.673">
          <bio:group>ModelViewParmSubset_11</bio:group>
        </bio:parameter>
      </bio:mechanism>
      <bio:mechanism name="GRC_LKG1" type="Channel Mechanism">
        <bio:parameter name="gmax" value="5e-06">
          <bio:group>ModelViewParmSubset_12</bio:group>
        </bio:parameter>
        <bio:parameter name="gmax" value="0.00857593">
          <bio:group>ModelViewParmSubset_10</bio:group>
        </bio:parameter>
        <bio:parameter name="gmax" value="0.0225443">
          <bio:group>ModelViewParmSubset_13</bio:group>
        </bio:parameter>
        <bio:parameter name="gmax" value="0.0450886">
          <bio:group>ModelViewParmSubset_14</bio:group>
        </bio:parameter>
        <bio:parameter name="gmax" value="0.096189">
          <bio:group>ModelViewParmSubset_11</bio:group>
        </bio:parameter>
        <bio:parameter name="gmax" value="0.107226">
          <bio:group>OneSecGrp_SectionRef_95</bio:group>
        </bio:parameter>
        <bio:parameter name="el" value="-16.5">
          <bio:group>all</bio:group>
        </bio:parameter>
      </bio:mechanism>
      <bio:mechanism name="GRC_LKG2" type="Channel Mechanism">
        <bio:parameter name="ggaba" value="0">
          <bio:group>OneSecGrp_SectionRef_95</bio:group>
        </bio:parameter>
        <bio:parameter name="ggaba" value="4.76288e-05">
          <bio:group>ModelViewParmSubset_13</bio:group>
        </bio:parameter>
        <bio:parameter name="ggaba" value="9.52576e-05">
          <bio:group>ModelViewParmSubset_14</bio:group>
        </bio:parameter>
        <bio:parameter name="egaba" value="-65">
          <bio:group>ModelViewParmSubset_3</bio:group>
        </bio:parameter>
      </bio:mechanism>
      <bio:mechanism name="GRC_NA" type="Channel Mechanism">
        <bio:parameter name="gmax" value="0">
          <bio:group>OneSecGrp_SectionRef_95</bio:group>
        </bio:parameter>
        <bio:parameter name="gmax" value="27.122">
          <bio:group>ModelViewParmSubset_10</bio:group>
        </bio:parameter>
        <bio:parameter name="gmax" value="238.889">
          <bio:group>ModelViewParmSubset_11</bio:group>
        </bio:parameter>
        <bio:parameter name="Aalfa" value="353.91">
          <bio:group>ModelViewParmSubset_1</bio:group>
        </bio:parameter>
        <bio:parameter name="Valfa" value="13.99">
          <bio:group>ModelViewParmSubset_1</bio:group>
        </bio:parameter>
        <bio:parameter name="Abeta" value="1.272">
          <bio:group>ModelViewParmSubset_1</bio:group>
        </bio:parameter>
        <bio:parameter name="Vbeta" value="13.99">
          <bio:group>ModelViewParmSubset_1</bio:group>
        </bio:parameter>
        <bio:parameter name="Agamma" value="150">
          <bio:group>ModelViewParmSubset_1</bio:group>
        </bio:parameter>
        <bio:parameter name="Adelta" value="40">
          <bio:group>ModelViewParmSubset_1</bio:group>
        </bio:parameter>
        <bio:parameter name="Aepsilon" value="1.75">
          <bio:group>ModelViewParmSubset_1</bio:group>
        </bio:parameter>
        <bio:parameter name="Ateta" value="0.0201">
          <bio:group>ModelViewParmSubset_1</bio:group>
        </bio:parameter>
        <bio:parameter name="Vteta" value="25">
          <bio:group>ModelViewParmSubset_1</bio:group>
        </bio:parameter>
        <bio:parameter name="ACon" value="0.005">
          <bio:group>ModelViewParmSubset_1</bio:group>
        </bio:parameter>
        <bio:parameter name="ACoff" value="0.5">
          <bio:group>ModelViewParmSubset_1</bio:group>
        </bio:parameter>
        <bio:parameter name="AOon" value="0.75">
          <bio:group>ModelViewParmSubset_1</bio:group>
        </bio:parameter>
        <bio:parameter name="AOoff" value="0.005">
          <bio:group>ModelViewParmSubset_1</bio:group>
        </bio:parameter>
        <bio:parameter name="n1" value="5.422">
          <bio:group>ModelViewParmSubset_1</bio:group>
        </bio:parameter>
        <bio:parameter name="n2" value="3.279">
          <bio:group>ModelViewParmSubset_1</bio:group>
        </bio:parameter>
        <bio:parameter name="n3" value="1.83">
          <bio:group>ModelViewParmSubset_1</bio:group>
        </bio:parameter>
        <bio:parameter name="n4" value="0.738">
          <bio:group>ModelViewParmSubset_1</bio:group>
        </bio:parameter>
      </bio:mechanism>
      <bio:spec_capacitance>
        <bio:parameter value="0.45">
          <bio:group>OneSecGrp_SectionRef_58</bio:group>
        </bio:parameter>
        <bio:parameter value="0.5">
          <bio:group>OneSecGrp_SectionRef_59</bio:group>
        </bio:parameter>
        <bio:parameter value="1">
          <bio:group>ModelViewParmSubset_6</bio:group>
        </bio:parameter>
      </bio:spec_capacitance>
      <bio:spec_axial_resistance>
        <bio:parameter value="0.09">
          <bio:group>OneSecGrp_SectionRef_57</bio:group>
        </bio:parameter>
        <bio:parameter value="0.1">
          <bio:group>ModelViewParmSubset_5</bio:group>
        </bio:parameter>
      </bio:spec_axial_resistance>
    </biophysics>
  </cell>
</cells>
</neuroml>
